** this file was translated by software: CircleCircle2, Wed Jul 22 21:34:58 2026
** software isn't human, it can make mistakes
**
**
*NODE
18000090  ,  -779.3928182756,  -442.3752121582,   335.2811556878
18000091  ,  -779.3928182756,  -452.3752121582,   325.2811556878
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*NODE
18046128  ,  -848.5118944094,  -102.9189858006,    13.2746690116
18046129  ,  -681.8706670000,   115.1869960000,   308.7244260000
18046130  ,  -733.8706670000,   115.1869960000,   308.7244260000
**HW_COMPONENT     ID=1800059     COLOR=1800059     NAME=Support_plate_S628_5p0     PROPERTY=p_shell_5.0_S620_Alu_Gissmo
*ELEMENT,TYPE=S3,ELSET=p_shell_5.0_S620_Alu_Gissmo
18035299  ,18041256  ,18041228  ,18041229
**HW_COMPONENT     ID=1800059     COLOR=1800059     NAME=Support_plate_S628_5p0     PROPERTY=p_shell_5.0_S620_Alu_Gissmo
*ELEMENT,TYPE=S4,ELSET=p_shell_5.0_S620_Alu_Gissmo
18035286  ,18039425  ,18041229  ,18041228  ,18041236
**HW_COMPONENT     ID=1800062     COLOR=1800062     NAME=tow_hook_shell     PROPERTY=p_shell_3p5mm_minth_s620
*ELEMENT,TYPE=S4,ELSET=p_shell_3p5mm_minth_s620
18035301  ,18041293  ,18041294  ,18041281  ,18041282
18035302  ,18041295  ,18041293  ,18041282  ,18041283
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**HW_COMPONENT     ID=1800068     COLOR=1800068     NAME=upper_beam_contact_1     PROPERTY=p_shell_5.0_default_2
*ELEMENT,TYPE=S4,ELSET=p_shell_5.0_default_2
18047961  ,18044825  ,18044827  ,18044821  ,18044822
18047962  ,18044827  ,18044817  ,18044818  ,18044821
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**HW_COMPONENT     ID=1800069     COLOR=1800069     NAME=lower_beam     PROPERTY=p_shell_5.0_default_3
*ELEMENT,TYPE=S4,ELSET=p_shell_5.0_default_3
18048201  ,18044986  ,18044984  ,18044990  ,18044989
18048202  ,18044984  ,18044994  ,18044993  ,18044990
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**HW_COMPONENT     ID=1800070     COLOR=1800070     NAME=mat20_title     PROPERTY=p_shell_3p5mm_Test_mat20_title
*ELEMENT,TYPE=S4,ELSET=p_shell_3p5mm_Test_mat20_title
18048319  ,18045223  ,18045225  ,18045219  ,18045220
18048320  ,18045225  ,18045215  ,18045216  ,18045219
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**HW_COMPONENT     ID=1800071     COLOR=1800071     NAME=mat123_title     PROPERTY=p_shell_3p5mm_S620_Alu_Gissmo_HAZ
*ELEMENT,TYPE=S4,ELSET=p_shell_3p5mm_S620_Alu_Gissmo_HAZ
18048391  ,18045314  ,18045316  ,18045310  ,18045311
18048392  ,18045316  ,18045306  ,18045307  ,18045310
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**HW_COMPONENT     ID=1800072     COLOR=1800072     NAME=upper_beam_mat133     PROPERTY=p_shell_3p5mm_minth_s632
*ELEMENT,TYPE=S4,ELSET=p_shell_3p5mm_minth_s632
18048463  ,18045405  ,18045407  ,18045401  ,18045402
18048464  ,18045407  ,18045397  ,18045398  ,18045401
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**HW_COMPONENT     ID=1800060     COLOR=1800060     NAME=solid_2     PROPERTY=p_solid_1_default_2
*ELEMENT,TYPE=C3D4,ELSET=p_solid_1_default_2
18004156  ,18041240  ,18041249  ,18041248  ,18041250
18004159  ,18041249  ,18041240  ,18041239  ,18041250
**HW_COMPONENT     ID=1800066     COLOR=1800066     NAME=tow_hook_solid_1     PROPERTY=p_solid_1_default_1
*ELEMENT,TYPE=C3D4,ELSET=p_solid_1_default_1
18037979  ,18042047  ,18041988  ,18042505  ,18042045
18037980  ,18042429  ,18042397  ,18041918  ,18042395
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**HW_COMPONENT     ID=1800067     COLOR=1800067     NAME=tow_hook_solid_2     PROPERTY=p_solid4_S620_Alu_Gissmo
*ELEMENT,TYPE=C3D4,ELSET=p_solid4_S620_Alu_Gissmo
18043872  ,18043439  ,18043437  ,18043410  ,18043861
18043873  ,18043171  ,18043487  ,18043172  ,18043862
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**HW_COMPONENT     ID=1800001     COLOR=1800001     NAME=bracket     PROPERTY=p_solid_1_S632_MAT133_Gissmo
*ELEMENT,TYPE=C3D5,ELSET=p_solid_1_S632_MAT133_Gissmo
18048317  ,18034169  ,18034171  ,18034172  ,18034170  ,18045180
18048318  ,18034169  ,18034249  ,18034251  ,18034171  ,18045182
**HW_COMPONENT     ID=1800001     COLOR=1800001     NAME=bracket     PROPERTY=p_solid_1_S632_MAT133_Gissmo
*ELEMENT,TYPE=C3D6,ELSET=p_solid_1_S632_MAT133_Gissmo
18004130  ,18036117  ,18036120  ,18036128  ,18036173  ,18036176  ,18036184
**HW_COMPONENT     ID=1800001     COLOR=1800001     NAME=bracket     PROPERTY=p_solid_1_S632_MAT133_Gissmo
*ELEMENT,TYPE=C3D8,ELSET=p_solid_1_S632_MAT133_Gissmo
18002694  ,18034252  ,18034250  ,18034249  ,18034251  ,18034172  ,18034170  ,18034169  ,18034171
18002754  ,18034048  ,18034049  ,18034037  ,18034038  ,18034252  ,18034250  ,18034249  ,18034251
18002765  ,18034440  ,18034438  ,18034437  ,18034439  ,18034400  ,18034398  ,18034397  ,18034399
18004125  ,18036144  ,18036145  ,18036173  ,18036176  ,18036088  ,18036089  ,18036117  ,18036120
**HW_COMPONENT     ID=1800064     COLOR=1800064     NAME=tow_hook_solid     PROPERTY=p_solid_1_default_3
*ELEMENT,TYPE=C3D8,ELSET=p_solid_1_default_3
18047521  ,18043963  ,18043985  ,18043972  ,18043973  ,18043993  ,18043994  ,18043995  ,18043996
18047522  ,18043993  ,18043994  ,18043995  ,18043996  ,18043997  ,18043998  ,18043999  ,18044000
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**HW_COMPONENT     ID=1800073     COLOR=1800073     NAME=part_inertia_1     PROPERTY=p_solid4_minth_s632
*ELEMENT,TYPE=C3D8,ELSET=p_solid4_minth_s632
18048535  ,18045462  ,18045480  ,18045467  ,18045468  ,18045488  ,18045489  ,18045490  ,18045491
18048536  ,18045488  ,18045489  ,18045490  ,18045491  ,18045492  ,18045493  ,18045494  ,18045495
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*MATERIAL, NAME=S632_MAT133_Gissmo
*DENSITY
2.7e-06, 0.0
*ELASTIC, TYPE = ISOTROPIC
70.0, 0.3, 0.0
*PLASTIC
0.0, 320.0,
0.02, 321.2,
0.03, 322.2,
0.05, 325.5,
*MATERIAL, NAME=S620_Alu_Gissmo
*DENSITY
2.7e-06, 0.0
*ELASTIC, TYPE = ISOTROPIC
70.0, 0.3, 0.0
*PLASTIC
0.0, 200.0,
0.01, 201.2,
0.02, 202.2,
0.04, 210.5,
*MATERIAL, NAME=default_2
*DENSITY
2.7e-06, 0.0
*ELASTIC, TYPE = ISOTROPIC
70.0, 0.33, 0.0
*MATERIAL, NAME=minth_s620
*DENSITY
2.7e-06, 0.0
*ELASTIC, TYPE = ISOTROPIC
70.0, 0.3, 0.0
*PLASTIC
0.0, 200.0,
0.01, 201.2,
0.02, 202.2,
0.04, 210.5,
*MATERIAL, NAME=default_3
*DENSITY
7.85e-06, 0.0
*ELASTIC, TYPE = ISOTROPIC
210.0, 0.33, 0.0
*MATERIAL, NAME=Test_mat20_title
*DENSITY
7.85e-06, 0.0
*ELASTIC, TYPE = ISOTROPIC
210.0, 0.33, 0.0
*MATERIAL, NAME=S620_Alu_Gissmo_HAZ
*DENSITY
2.7e-06, 0.0
*ELASTIC, TYPE = ISOTROPIC
70.0, 0.3, 0.0
*PLASTIC
0.0, 180.0,
0.01, 181.2,
0.02, 182.2,
0.04, 190.5,
*MATERIAL, NAME=minth_s632
*DENSITY
2.7e-06, 0.0
*ELASTIC, TYPE = ISOTROPIC
70.0, 0.3, 0.0
*PLASTIC
0.0, 320.0,
0.02, 321.2,
0.03, 322.2,
0.05, 325.5,
*SHELL SECTION, ELSET=p_shell_5.0_S620_Alu_Gissmo, MATERIAL=S620_Alu_Gissmo
5.0       ,2.4
*SHELL SECTION, ELSET=p_shell_3p5mm_minth_s620, MATERIAL=minth_s620
3.5       ,5
*SHELL SECTION, ELSET=p_shell_5.0_default_2, MATERIAL=default_2
5.0       ,2.4
*SHELL SECTION, ELSET=p_shell_5.0_default_3, MATERIAL=default_3
5.0       ,2.4
*SHELL SECTION, ELSET=p_shell_3p5mm_Test_mat20_title, MATERIAL=Test_mat20_title
3.5       ,5
*SHELL SECTION, ELSET=p_shell_3p5mm_S620_Alu_Gissmo_HAZ, MATERIAL=S620_Alu_Gissmo_HAZ
3.5       ,5
*SHELL SECTION, ELSET=p_shell_3p5mm_minth_s632, MATERIAL=minth_s632
3.5       ,5
*SOLID SECTION, ELSET=p_solid_1_S632_MAT133_Gissmo, MATERIAL=S632_MAT133_Gissmo
*SOLID SECTION, ELSET=p_solid_1_default_2, MATERIAL=default_2
*SOLID SECTION, ELSET=p_solid_1_default_3, MATERIAL=default_3
*SOLID SECTION, ELSET=p_solid_1_default_1, MATERIAL=default_1
*SOLID SECTION, ELSET=p_solid4_S620_Alu_Gissmo, MATERIAL=S620_Alu_Gissmo
*SOLID SECTION, ELSET=p_solid4_minth_s632, MATERIAL=minth_s632
*KINEMATIC COUPLING,REF NODE=18046128
18043945  , 1, 6
18043948  , 1, 6
18043951  , 1, 6
18043954  , 1, 6
18043957  , 1, 6
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18044632  , 1, 6
*KINEMATIC COUPLING,REF NODE=18046129
18044928  , 1, 6
18044929  , 1, 6
18044930  , 1, 6
18044931  , 1, 6
18044932  , 1, 6
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18044927  , 1, 6
*KINEMATIC COUPLING,REF NODE=18046130
18045183  , 1, 6
18045184  , 1, 6
18045185  , 1, 6
18045186  , 1, 6
18045187  , 1, 6
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18045273  , 1, 6
*KINEMATIC COUPLING,REF NODE=18041257
18034037  , 1, 6
18034038  , 1, 6
18034048  , 1, 6
18034049  , 1, 6
18041228  , 1, 6
18041229  , 1, 6
18041256  , 1, 6
*BOUNDARY
18046128          , 2, 2, 0.0
18046128          , 3, 3, 0.0
18046128          , 5, 5, 0.0
*BOUNDARY
18046129          , 2, 2, 0.0
18046129          , 3, 3, 0.0
18046129          , 5, 5, 0.0
*BOUNDARY
18046130          , 1, 1, 0.0
18046130          , 5, 5, 0.0
